Г := 3
N := 11
a := Г*N
b := Г + N
ORIGIN := 1
M := [Г + N + 1, Г + N + 2, Г + N + 3; Г + N + 4, Г + N + 5, Г + N + 6; Г + N + 7, Г + N + 8, Г + N + 9]
V := [Г + N + 1; Г + N + 2; Г + N + 3]
cols(V) = 1
V = [15; 16; 17]
|V| = 27.7489
rows(V) = 3
length(V) = 3
last(V) = 3
M = [15, 16, 17; 18, 19, 20; 21, 22, 23]
|M| = 4.26326e-14
M1 → M1
M1 := [2/(a - b), 2/(a + b); (a - b)/2, (a + b)/2]
M1 → [2/19, 2/47; 19/2, 47/2]
M1 = [0.105263, 0.0425532; 9.5, 23.5]
M1[1, 1] = 0.105263
M1[1, 1] → 2/19
M1[1, 2] → 2/47
M1[1, 2] = 0.0425532
M1[2, 1] → 19/2
M1[2, 1] = 9.5
M1[2, 2] = 23.5
M1[2, 2] = 23.5
M := [Г + N + 1, Г + N + 2, Г + N + 3; Г + N + 4, Г + N + 5, Г + N + 6; Г + N + 7, Г + N + 8, Г + N + 9]
M2[3, 1] := Г + N + 3
M2[1, 1] := Г + N + 1
M2[2, 1] := Г + N + 2
M2[1, 2] := Г + N + 4
M2[3, 2] := Г + N + 6
M2[2, 2] := Г + N + 6
M2[3, 3] := Г + N + 9
M2[1, 2] := Г + N + 7
M2[2, 2] := Г + N + 8
M2 := [M2[1, 1], M2[2, 1], M2[3, 1]; M2[1, 2], M2[2, 2], M2[3, 2]; M2[1, 3], M2[2, 3], M2[3, 3]] = [15, 16, 17; 21, 22, 20; 0, 0, 23]
M2 = [15, 16, 17; 21, 22, 20; 0, 0, 23]
V1 := M[:, 1] = [15; 18; 21]
V2 := transpose(M2)[:, 1] = [15; 16; 17]
transpose(V2) = [15, 16, 17]
i2 := 1 .. 8
j2 := i2
i3 := 1 .. 4
S[i2, j2] := N*i2 + Г*j2
S = [
    14, 17, 20, 23, 26, 29, 32, 35;
    25, 28, 31, 34, 37, 40, 43, 46;
    36, 39, 42, 45, 48, 51, 54, 57;
    47, 50, 53, 56, 59, 62, 65, 68;
    58, 61, 64, 67, 70, 73, 76, 79;
    69, 72, 75, 78, 81, 84, 87, 90;
    80, 83, 86, 89, 92, 95, 98, 101;
    91, 94, 97, 100, 103, 106, 109, 112
]
X[i3] := 2*Г*i3 + 2*N
X = [28; 34; 40; 46]
Y[i3] := X[i3]^2
Y = [784; 1156; 1600; 2116]
R[i2, j2] := S[i2, j2]^2
R = [
    196, 289, 400, 529, 676, 841, 1024, 1225;
    625, 784, 961, 1156, 1369, 1600, 1849, 2116;
    1296, 1521, 1764, 2025, 2304, 2601, 2916, 3249;
    2209, 2500, 2809, 3136, 3481, 3844, 4225, 4624;
    3364, 3721, 4096, 4489, 4900, 5329, 5776, 6241;
    4761, 5184, 5625, 6084, 6561, 7056, 7569, 8100;
    6400, 6889, 7396, 7921, 8464, 9025, 9604, 10201;
    8281, 8836, 9409, 10000, 10609, 11236, 11881, 12544
]
A := [28, 784; 34, 1156; 40, 1600; 46, 2116]
WRITEPRN("11_ЕРИНА_АЛИНА0") := A
WRITEPRN("11_ЕРИНА_АЛИНА1") := S
WRITEPRN("11_ЕРИНА_АЛИНА2") := R
A2 := READPRN("ВАРИАНТ_11.prn")  # error: Can't open the data file.
A2 =  # error: This variable is undefined.
Г := 3
L := [N + Г + 1, N + Г + 2; N + Г + 3, N + Г + 4] = [15, 16; 17, 18]
N := 11
K := [1, 0; -1, -1]
L + K = [16, 16; 16, 17]
i := 1 .. 2
j := 1 .. 2
M3[i, j] := L[i, j] + K[i, j]
M3 = [16, 16; 16, 17]
L - K = [14, 16; 18, 19]
M4[i, j] := L[i, j] - K[i, j]
M4 = [14, 16; 18, 19]
N + L = [26, 27; 28, 29]
M5[i, j] := N + L[i, j]
M5 = [26, 27; 28, 29]
A3 := [N + Г + 1, N + Г + 3, N + Г + 5, N + Г + 7; N + Г + 2, N + Г + 4, N + Г + 6, N + Г + 8] = [15, 17, 19, 21; 16, 18, 20, 22]
B3 := [N + Г + 1, N + Г + 5; N + Г + 2, N + Г + 6; N + Г + 3, N + Г + 7; N + Г + 4, N + Г + 8] = [15, 19; 16, 20; 17, 21; 18, 22]
C3 := A3*B3 = [1198, 1486; 1264, 1568]
sum(A3*B3, j = 1 .. 1) = [1198, 1486; 1264, 1568]
-L → [-15, -16; -17, -18]
T := -N*L = [-165, -176; -187, -198]
|C3| → 160
|C3| = 160
C3[1, 1]*C3[2, 2] - C3[1, 2]*C3[2, 1] = 160
|C3| = 160
|C3| → 160
|V| = 27.7489
|V| → sqrt(770)
|V| =  # error: This matrix must be square.
# Определитель можно вычислить только для квадратной матрицы,
# вектор-не квадратная матрица.
|V| → sqrt(770)
X := [N + Г + 10; N + Г + 11; N + Г + 12]
X = [24; 25; 26]
Y := [N + Г + 13; N + Г + 14; N + Г + 15]
Y = [27; 28; 29]
X*Y = 2102
sum(X[j]*Y[j], j = 1 .. 3) = 2102
Z := [
    X[2, 1]*Y[3, 1] - Y[2, 1]*X[3, 1];
    -(X[1, 1]*Y[3, 1] - Y[1, 1]*X[3, 1]);
    X[1, 1]*Y[2, 1] - Y[1, 1]*X[2, 1]
] = [-3; 6; -3]
transpose(X) = [24, 25, 26]
|X| = 43.3244
X = [24; 25; 26]
|Y| = 48.518
ϕ := acos(X*Y/(|X|*|Y|)) = 0.00349593
Z = [-3; 6; -3]
|Z| = 7.34847
|Z| := |X|*|Y|*sin(ϕ)  # error: A name is required here.
Z[1] := (-1)^(1 - 1)*[X[2, 1], X[3, 1]; Y[2, 1], Y[3, 1]]
Z[2] := (-1)^(2 - 1)*[X[1, 1], X[3, 1]; Y[1, 1], Y[3, 1]] = [-24, -26; -27, -29]
Z[3] := (-1)^(3 - 1)*[X[1, 1], X[2, 1]; Y[1, 1], Y[2, 1]]
sum(X) + sum(Y) = 159
X[1] + X[2] + X[3] + Y[1] + Y[2] + Y[3] = 159
L = [15, 16; 17, 18]
tr(L) = 33
sum(L[j, j], j = 1 .. 2) = 33
M6 := [-N*π, -N*π/3; -N*π/2, 0] = [-34.5575, -11.5192; -17.2788, 0]
vectorize(sin(M6)) = [0, 0.866025; 1, 0]
A4 := [Г + N + 9, Г + N + 8, Г + N + 7; Г + N + 3, Г + N + 0, Г + N + 1; Г + N + 2, Г + N + 4, Г + N + 1] = [23, 22, 21; 17, 14, 15; 16, 18, 15]
minor(Aa, Am, An) :=
    for i ∈ 1 .. 3
        Aa[Am, i] ← NaN
    Aa ← filterNaN(Aa)
    Bb ← transpose(Aa)
    for i ∈ 1 .. 2
        Bb[An, i] ← NaN
    Aa ← filterNaN(Bb)
    Aa ← transpose(Aa)
    Aa
minor(A4, 2, 2) = [23, 21; 16, 15]
B4[i, j] := minor(A4, i, j)*(-1)^(i + j)/|A4|
B4 = [
    [1.16667, 1.25; 1.5, 1.25], [-1.41667, -1.25; -1.33333, -1.25];
    [-1.83333, -1.75; -1.5, -1.25], [1.91667, 1.75; 1.33333, 1.25]
]
mod(N, 5) + 2 = 3
B4[i, j] := |minor(A4, i, j)|*(-1)^(i + j)/|A4|
identity(mod(N, 5) + 2) = [1, 0, 0; 0, 1, 0; 0, 0, 1]
B4 = [-5, -1.25; 4, 0.75]
B5 := mod(N, 7) = 4
B5 := identity(mod(N, 5) + 2) = [1, 0, 0; 0, 1, 0; 0, 0, 1]
A4*A4^-1 = [1, -1.42109e-14, -1.42109e-14; 0, 1, -1.42109e-14; 0, 0, 1]
A4^0 = [1, 0, 0; 0, 1, 0; 0, 0, 1]
V5 := [Г + N + 1; Г + N + 2; Г + N + 3] = [15; 16; 17]
C5 := diag(V5) = [15, 0, 0; 0, 16, 0; 0, 0, 17]
Z4 := submatrix(A4, 2, 3, 2, 3) = [14, 15; 18, 15]
Z5 := submatrix(A4, 3, 3, 2, 3) = [18, 15]
Z6 := submatrix(A4, 1, 3, 2, 2) = [22; 14; 18]
F := augment(V5, Z, Z6) = [15, [25, 26; 28, 29], 22; 16, [-24, -26; -27, -29], 14; 17, [24, 25; 27, 28], 18]
L1 := [15, 16, 0; 17, 18, 0; 0, 0, 0]
G := stack(A4, L1) = [23, 22, 21; 17, 14, 15; 16, 18, 15; 15, 16, 0; 17, 18, 0; 0, 0, 0]
csort(G, 3) = [0, 0, 0; 17, 18, 0; 15, 16, 0; 16, 18, 15; 17, 14, 15; 23, 22, 21]
rsort(G, 3) = [21, 23, 22; 15, 17, 14; 15, 16, 18; 0, 15, 16; 0, 17, 18; 0, 0, 0]
V6 := [N + mod(6, 3) + 1; N + mod(2, 4) + 1; N + mod(8, 5) + 1] = [12; 14; 15]
sort(V6) = [12; 14; 15]
reverse(V6) = [15; 14; 12]
x1 := 0
x2 := 0
x3 := 0
x4 := 0
Given
2*x1 + 3*x2 + x3 + 4*x4 == 3
x2 + 2*x3 + x4 == 5
2*x1 + x3 + 5*x4 == 10
x1 + x2 + x3 + 2*x4 == 1
Find(x1, x2, x3, x4) = [-12; 0; -1; 7]
O := [2, 3, 1, 4; 0, 1, 2, 1; 2, 0, 1, 5; 1, 1, 1, 2]
P := [3; 5; 10; 1]
O^-1*P = [-12; 0; -1; 7]
lsolve(O, P) → [-12; 0; -1; 7]
